finish
/clear
/prep7
! ! 定义材料
! mp,ex,1,2e11
! mp,prxy,1,0.3
! mp,dens,1,780
! ! et,1,beam188 ! 梁柱结构单元
! et,1,beam188 ! 杆状结构单元
! et,2,solid186  !壳体结构单元
!*
ET,1,BEAM188
!*
ET,2,SHELL181
!*
MPDATA,EX,1,,2.1e11
MPDATA,PRXY,1,,0.3
MPDATA,DENS,1,,7850
MPDATA,EX,2,,3.5e10
MPDATA,PRXY,2,,0.1667
MPDATA,DENS,2,,2500
! 根据材料的类型定义预先定义参数--梁单元要定义截面尺寸
SECTYPE,   1, BEAM, I, , 0
SECDATA,0.4,0.4,0.4,0.016,0.016,0.016
SECTYPE,   2, BEAM, I, , 0
SECDATA,0.4,0.4,0.4,0.012,0.012,0.012
SECTYPE,   3, BEAM, I, , 0
SECDATA,0.3,0.3,0.3,0.012,0.012,0.012
sect,4,shell
secdata, 0.3,2,0.0,1
! 定义参数
div1 = 3 !线段的长度
! press = 600
! 定key
n,1,0,div1*4
! n,2,3,div1*4
! 根据点复制
ngen,3,1,all,,,,-3
*get,np_num,node,0,num,maxd
! ngen,2,1,np_num,,,-3
! z方向复制node
! ngen,6,1,all,,,,,0
n,np_num + 1,0,div1*4,3
n,np_num + 2,0,div1*3,3
n,np_num + 3,0,div1*2,3

! 获取node最大编号
*get,np_num,node,0,num,maxd
! 创建桥边点
n,np_num + 1,0,div1,div1
! n,np_num + 2,3,div1,div1
! 获取node最大编号
*get,np_num,node,0,num,maxd
! 创建桥面node
n,np_num + 1,0,div1*5,3
n,np_num + 2,0,0,3
! 创建桥上线 --- 五个点
n,np_num + 5,0,0,div1*2
n,np_num + 6,0,div1,div1*2
n,np_num + 7,0,div1*2,div1*2
n,np_num + 8,0,div1*3,div1*2
n,np_num + 9,0,div1*2,div1*3
! 指定单元类型
! 连接一面的关键点
type,1
! r,1 !定义实常数
! real,1
! mat,l
e,1,2 $e,2,3 $e,8,4 $e,4,5 $e,5,6 $e,6,7 $e,7,9 $e,15,14 $e,14,13 $e,13,12 $e,1,4 $e,2,4 $e,2,5 $e,2,6 $e,3,6 $e,8,15 $e,5,15 $e,6,15 $e,6,14 $e,6,13 $e,7,13 $e,9,13 $e,9,12 $e,14,16 $e,15,16 $e,16,12
! 选中全部进行复制
allsel
*get,np_num,node,0,num,maxd
! 复制移动节点
ngen,2,np_num,all,,,3
! 镜像单元
esym, ,np_num,all
! 重新编号
nummrg,all
numcmp,all
! 中间关键点连接
allsel
*do,i,1,14
  e,i,i+14
*enddo
save
*get,np_num,node,0,num,maxd
! 镜像节点
nsym,y,np_num,all
! 镜像单元
esym, ,np_num,all
allsel
! 合并关键点--并重新编号
nummrg,all
numcmp,all
! ! ! 移动工作平面
! wpoffs,0,-div1*5,div1
! ! type,1 !截面代号
! ! r,1 !定义实常数
! ! real,1
! ! mat,l
! ! 创建桥面体
! blc4,,,div1,div1*10,div1/20
! ! 定义桥面单元
! type,2
! vsel,all
! ! 划分长方体的网格
! esize,div1/20
! ! 体网格划分
! vsweep,all
! 合并单元
! CM, e1, elem
! 加载======
! 选中加载节点
! nsel,s,loc,z,3
! nsel,r,loc,y,3,-15
! nsel,u,loc,y,-6,-15+0.01
! d,all,uz,0      ! z方向约束掉
! 施加压力
! f,node,lab,value,value2,nend,ninc
! f,7,fz,-600
! f,21,fz,-600
! f,9,fz,-600
! f,23,fz,-600
! f,35,fz,-600
! f,47,fz,-600
! f,48,fz,-600
! f,36,fz,-600
! /solu
! ! 指定静力分析
! antype,0
! allsel,all
! solve
! ! sfe,all,1,pre,,pre/d


! 根据节点创建面单元---前提是要定义好材料的属性（特别是板的厚度）
! FLST,2,4,1
! FITEM,2,22
! FITEM,2,8
! FITEM,2,4
! FITEM,2,18
! E,all
